dimension 3
boundary p p p
atom_style full
units metal
kspace_style pppm/cg 1.0e-4
kspace_modify pressure/scalar no
bond_style harmonic
angle_style harmonic

neighbor 2.0 bin
neigh_modify delay 0 every 1 check yes

region box1 block -40.0 40.0 -40.0 40.0 -40.0 40.0
create_box 4 box1 bond/types 2 extra/bond/per/atom 2 angle/types 1 extra/angle/per/atom 1 extra/special/per/atom 10

molecule cat_ion cation_mol.txt

mass    1  86.8 #anion
mass    2  67.0 #ring
mass    3  15.0 #methyl
mass    4  29.0 #ethyl

create_atoms 1 random 40 1340 box1                     #at least 40
create_atoms 0 random 40 2345 box1 mol cat_ion 1234    #at least 40
#create_atoms 1 single  10.0 0.0 0.0
#create_atoms 0 single 0.0 0.0 0.0 mol cat_ion 1234
group anion type 1
group ring type 2
group methyl type 3
group ethyl type 4

bond_coeff 1 87.729 2.689748837
bond_coeff 2 87.729 3.04931147
angle_coeff 1 87.729 144.1868904
#pair_style lj/cut/coul/long 30.0
pair_style nm/cut/coul/long 20.0 30.0
#pair_modify mix geometric
################### properties to change
#pair_coeff 1 1   1.4320625610948    1.0757575757576
#pair_coeff 2 2   1.4320625610948    8.4677419354839
#pair_coeff 3 3   3.533724340176     1.0293255131965
#pair_coeff 4 4   4.3206256109482    4.3817204301075
pair_coeff 1 1 4.0909090909091      1.3264907135875     12 6
pair_coeff 1 2 4.0909090909091      4.48387096774195    12 6
pair_coeff 1 3 1.799760047989343    1.17790811339       12 6
pair_coeff 1 4 0.4471539789436037   2.9655425219941     12 6
pair_coeff 2 2 4.0909090909091      7.641251221896      12 6
pair_coeff 2 3 1.799760047989343    4.3352883675464     12 6
pair_coeff 2 4 0.4471539789436037   6.1229227761486005  12 6
pair_coeff 3 3 0.79178885630499     1.029325513196      12 6
pair_coeff 3 4 0.19672152294719567  2.8169599217986496  12 6
pair_coeff 4 4 0.048875855327468    4.604594330400      12 6

#create_bonds single/bond 1 2 3
#create_bonds single/bond 2 2 4
#create_bonds single/angle 1 3 2 4

set type 1 charge -1.0
#set type 2 charge  0.408675
#set type 3 charge  0.317505
#set type 4 charge  0.273820

########################################

write_data solid.data pair ij

thermo_style	custom step temp pe ke ebond press density

##################################
variable    T equal 298.0
variable    V equal vol
variable    dt equal 0.0001
variable    p equal 400     # correlation length
variable    s equal 5       # sample interval
variable    d equal $p*$s   # dump interval

# convert from LAMMPS real units to SI

variable    kB equal 1.3806504e-23    # [J/K/** Boltzmann
variable    bar2Pa equal 100000.0
variable    A2m equal 1.0e-10
variable    ps2s equal 1.0e-12
variable    convert equal ${bar2Pa}*${bar2Pa}*${ps2s}*${A2m}*${A2m}*${A2m}
timestep     ${dt}
variable    tdamp equal ${dt}*10.
variable    pdamp equal ${dt}*100.
thermo       $d

variable  ILdens equal density
variable  ILstep equal step
variable  ILtime equal time*1.0e-12 #from ps to s
variable  ILtemp equal temp
variable  ILpe equal pe
variable  ILke equal ke
variable  ILpr equal press

##################################
fix             333 all print 2000 "${ILstep} ${ILtime} ${ILdens} ${ILtemp} ${ILpr} ${ILpe} ${ILke}" file density.dat screen no
dump 1 all dcd $d minim.dcd
dump 2 all custom $d dump.atom id mass type x y z

##################################
##################################
#  Minimize initial
##################################

velocity     all create $T 102486 mom yes rot yes dist gaussian
minimize 1.e-4 1.0e-6 1000 10000

reset_timestep 0
fix 1 all npt temp $T $T ${tdamp} iso 1.0 1.0 ${pdamp}
run             800000
unfix 1
unfix 333
fix 1 all nvt temp $T $T ${tdamp}

reset_timestep 0
variable     pxy equal pxy
variable     pxz equal pxz
variable     pyz equal pyz
fix          SS all ave/correlate $s $p $d &
             v_pxy v_pxz v_pyz type auto file S0St.dat ave running
variable     scale equal ${convert}/(${kB}*$T)*$V*$s*${dt}
variable     v11 equal trap(f_SS[3])*${scale}
variable     v22 equal trap(f_SS[4])*${scale}
variable     v33 equal trap(f_SS[5])*${scale}
variable     v equal (v_v11+v_v22+v_v33)/3.0
fix          333 all print $d "${ILstep} ${ILtime} ${ILdens} ${ILtemp} ${ILpr} ${ILpe} ${v}" file visco.dat screen no
thermo_style custom step temp pe press v_pxy v_pxz v_pyz v_v11 v_v22 v_v33
run          8000000
variable     ndens equal count(all)/vol
print        "average viscosity: $v [Pa.s] @ $T K, ${ndens} /A^3"
